<?xml version="1.0" encoding="UTF-8"?>
<channelml xmlns="http://morphml.org/channelml/schema"
	   xmlns:xsi="http://www.w3.org/2001/XMLSchema-instance"
	   xmlns:meta="http://morphml.org/metadata/schema"
	   xsi:schemaLocation="http://morphml.org/channelml/schema  http://sourceforge.net/p/neuroml/code/1087/tree/trunk/web/NeuroMLFiles/Schemata/v1.8.1/Level2/ChannelML_v1.8.1.xsd?format=raw"
	   units="Physiological Units">

    <meta:notes>ChannelML file containing a single Channel description</meta:notes>

    <channel_type name="Kdr_ChannelML" density="yes">

        <status value="in_progress">
            <meta:comment>Equations adapted from paper for modern convention of external potential being zero</meta:comment>
            <meta:contributor>
                <meta:name>Padraig Gleeson</meta:name>
            </meta:contributor>
        </status>

        <meta:notes>Mitral cell K DR channel</meta:notes>

        <meta:neuronDBref>
            <meta:modelName>K channels</meta:modelName>
            <meta:uri>http://senselab.med.yale.edu/neuronDB/channelGene2.aspx#table3</meta:uri>
        </meta:neuronDBref>

        <current_voltage_relation cond_law="ohmic"
                                  ion="kdr"
                                  default_gmax="36"
                                  default_erev="-77.0"
                                  charge="1"
                                  fixed_erev="yes">

            <q10_settings q10_factor="3" experimental_temp="24"/>

            <gate name="m" instances="1">
                <closed_state id="m0"/>
                <open_state id="m" fraction="1"/>

                <transition name="alpha" from="m0" to="m" expr_form="exponential" rate="1" scale="18.1818181818" midpoint="-50" />
		<!-- A*exp(k*(v-d)) A = 1 k = 0.055 d = -50 -->
                <transition name="beta" from="m" to="m0" expr_form="exponential" rate="1" scale="36.3636363636" midpoint="-50" />
		<!-- A*exp(k*(v-d)) A = 1 k = 0.0275 d = -50 -->

                <time_course  name="tau" from="m0" to="m" expr_form="generic"
                              expr="beta/(0.0035 *( 1 +alpha))"/>
                <steady_state name="inf" from="m0" to="m" expr_form="sigmoid"
                              rate="1" scale="-10" midpoint="21" />
			      <!-- A/(1 + exp(k*(v-d))) A = 1 k = -0.1 d = 21 -->

	    </gate>
        </current_voltage_relation>

        <impl_prefs>
            <table_settings max_v="100" min_v="-100" table_divisions="400"/>
        </impl_prefs>

    </channel_type>
</channelml>
